# medium density fibre board production, uncoated

Dataset: EcoSpold 2, unit process
Geography: RER
Time period: 2012-01-01 to 2012-12-31
Technology level: current
Classification: EcoSpold01Categories: wooden materials/processing
Classification: ISIC rev.4 ecoinvent: 1621:Manufacture of veneer sheets and wood-based panels
Synonyms: MDF
Scenario: Business-as-Usual
Generated by: Frank Werner
Database: ecoinvent
isCopyrightProtected: true
accessRestrictedTo: 1

## General comment
This dataset represents medium density fibreboard (MDF) production as the weighted average of medium density board produced by the members of the European Panel Federation (EPF)
Medium density fibreboard (MDF) is an engineered wood product according to the standard EN 622-5. It is formed by breaking down hardwood or softwood residuals into wood fibres, often in a defibrator, combining it with wax and a resin binder, and forming panels by applying high temperature and pressure.
Over time, the word "MDF" has become a generic name for any dry process fibre board. MDF density is typically between 500 kg/m3 and 1000 kg/m3. Standard boards are available in Europe with thicknesses in the range of 1.8 to 60 mm.
The inventoried MDF has the following average composition:
Unlike most other wood based sheet materials, the uniform and close packed fibre distribution throughout the thickness of MDF allows detailed machining operations to be carried out on the faces and edges without breakout or the exposure of voids within the core of the board.
Standard MDF is being used for the manufacture of table tops, door panels and drawer fronts with moulded edges or profiled surfaces. The smooth and stable surfaces of MDF provide an excellent substrate for painting or the application of decorative foils or wood veneers. The inherent stability, good machinability and high strength of MDF creates opportunities for it to be used as an alternative to solid wood for applications such as drawer sides, cabinet rails, mirror surrounds and mouldings.
Although primarily developed for use in furniture, standard MDF is being used increasingly for shop fitments, exhibition displays, wall panelling, architectural mouldings and many other applications where its good machining and finishing characteristics are used to advantage.
MDF product types are available for the use in more demanding situations like for moisture resistant, flame retardant, high density and exterior grades of MDF.
Moisture resistant boards are being used for bathroom fitments, doors, window boards and other interior building applications where resistance to damp conditions or intermittent wetting are important requirements.
Flame retardant boards are being used increasingly for fitted furniture, doors and panelling in public buildings and other areas which have to conform to national fire regulations.

## Included activities start
From the reception at the factory gate of all materials and fuels used.

## Included activities end
Activity ends with the uncoated medium density board at the factory gate.

## Geography
Representation of the production of the member companies of the European Panel Federation (EPF).

## Technology
The most raw materials used for MDF production are wooden materials, such as logs with diameter of 50 – 200 mm, small diameter wood, roundwood core and veneer wastes from plywood produc-tion, saw dust and wood strips from sawmills etc. If necessary, the chips are washed to remove dirt and other debris.
Clean chips are softened in a steam-pressurized digester, then transported into a pressurized refiner chamber. In the refiner chamber, single or double revolving disks are used to mechanically pulp the softened chips into fibres suitable for making the board.
>From the refiners, the fibres move to the drying and blending area. A rotary predryer may be used for initial drying of relatively wet furnish. Regardless of whether or not a predryer is used, tube dryers typically are used to reduce the moisture content of the fibres to desired levels. Single-stage or multiple-stage tube drying systems are commonly used in MDF manufacture. Most of the multiple-stage tube drying systems incorporate two stages. In multiple-stage tube dryers, there is a primary tube dryer and a second stage tube dryer in series separated by an emission point such as a cyclonic collector. Heat is usually provided to tube dryers by the direct firing of propane, natural gas, or distillate oil or by indirect heating.
The sequence of the drying and blending operations depends on the method by which resins and other additives are blended with the fibres. Urea-formaldehyde (UF) resins are the most common resins used in the manufacture of MDF. Phenolic resins, melamine resins, and isocyanates are also used. Some plants inject resins into a short-retention blender, while most facilities inject resin formulations into a blowline system. If resin is added in a separate blender, the fibres are first dried and separated from the gas stream by a fibre recovery cyclone, then conveyed to the blender. The fibres then are blended with resin, wax, and any other additives and conveyed to a dry fibre storage bin.
If a blowline system is used, the fibres are first blended with resin, wax, and other additives in a blowline, which is a duct that discharges the resinated fibres to the dryer. After drying, the fibres are separated from the gas stream by a fibre recovery cyclone and then conveyed to a dry fibre storage bin.
Air conveys the resinated fibres from the dry storage bin to the forming machine, where they are deposited on a continuously moving screen system. The continuously formed mat must be pre-pressed before being loaded into the hot press. After prepressing, some pretrimming is done. The trimmed material is collected and recycled to the forming machine.
The prepressed and trimmed mats then are transferred to the hot press. The press applies heat and pressure to activate the resin and bond the fibres into a solid panel. The mat may be pressed in a continuous hot press, or the precompressed mat may be cut by a flying cut-off saw into individual mats that are then loaded into a multi-opening, batch-type hot press. Steam or hot oil heating of the press platens is common in European MDF plants. After pressing, the boards are cooled, sanded, trimmed, and sawed to final dimensions. The boards may also be painted or laminated. Finally, the finished product is packaged for shipment.

## Parameters
- input wood fuel: 4212.26 MJ; name wood_fuel; = 221*19.06
  input of wood fuel used in production, i.e. wood fuel from forestry, internal wood residues, post-consumer wood used for energy purposes, etc; expressed in MJ of absolutely dry mass (lower heating value at humidity u=0%)

## Reference product
- medium density fibreboard: 1 m3; By-product classification allocatable product; CPC 31441: Medium density fibreboard (MDF)
  production volume 1.11149e7 m3; name p_board
    FaoStat 2011
  property wet mass 684 kg; name MDF_WM
  property carbon content, non-fossil 0.421707; = 546*0.494/MDF_DM
    carbon content of wood mass divided by dry mass
  property water content 0.0694184; = MDF_WWM/MDF_DM
  property price 252 EUR2005
    Temporary price data. Calculated as 90% of purchasers price based on: 2004 prices for World Import/Export (USD/cubicmeter) from FaoStat (http://faostat.fao.org/site/626/default.aspx#ancor, [accessed 10th June 2010]) Commodity: 'Chips and Particles' assuming this is for air-dry chips (10% water on a dry matter basis at 650 kg/m3) and no price difference for water content (i.e. assuming air-drying).
  property dry mass 639.6 kg; name MDF_DM; = MDF_WM-MDF_WWM
  property water in wet mass 44.4 kg; name MDF_WWM
  properties: carbon content, fossil 0.0558423

## By-products
- wood ash mixture, pure: 2.00504 kg; name w_wood_ash; = 0.000476*wood_fuel; CPC 3928: Sawdust and wood waste and scrap; By-product classification Waste; lognormal variance with pedigree 0.026, pedigree (1,3,1,1,1)
  EcoSpold01Location=CH
  Emission factor from DS on heat generation from industrial residual wood mulitplied by the input of wood fuel (direct wood fuel plus production residues)
  production volume 2.22858e7 kg; = w_wood_ash*p_board
    Calculated from production volume of reference product using the relative outputs.
  properties: carbon content, fossil 0, water content 0, wet mass 1 kg, dry mass 1 kg, carbon content, non-fossil 0.012, water in wet mass 0 kg
- wastewater from medium density board production: 0.407 m3; name w_WW; CPC 39920: Sewage sludge; By-product classification Waste; lognormal variance with pedigree 0.026, pedigree (1,3,1,1,1)
  production volume 4.52377e6 m3; = w_WW*p_board
    Calculated from production volume of reference product using the relative outputs.
- biowaste: 0.903 kg; name w_biowaste; CPC 391: Wastes from food and tobacco industry; By-product classification Waste; lognormal variance with pedigree 0.026, pedigree (2,3,1,1,1)
  sludges from chip washing etc.
  production volume 1.00368e7 kg; = w_biowaste*p_board
    Calculated from production volume of reference product using the relative outputs.
  property price 0 EUR2005; name w_biowaste_price_EUR2005
    Material for treatment
  properties: nitrogen content 0, water content 1.5, water in wet mass 0.6 kg, wet mass 1 kg, dry mass 0.4 kg, carbon content, non-fossil 0.1624, carbon content, fossil 0
- hazardous waste, for incineration: 0.794185 kg; name w_HW; CPC 39: Wastes or scraps; By-product classification Waste; lognormal variance with pedigree 0.026, pedigree (1,3,1,1,1)
  Output of minor quantities of waste resins, oily filters and rags
  production volume 8.82731e6 kg; = w_HW*p_board
    Calculated from production volume of reference product using the relative outputs.
  property carbon content, fossil 0.554667
    Tab A.6, ecoinvent v2.2 report 13_I. C content has been calculated after data in the tables, and then referred to 1 kg DM
  properties: wet mass 1 kg, carbon content, non-fossil 0, water content 0.333333, water in wet mass 0.25 kg, dry mass 0.75 kg
- residual wood, dry: 0.046364 m3; name w_chips; CPC 39283: Non-agglomerated wood waste and scrap; By-product classification allocatable product; lognormal variance with pedigree 0.026, pedigree (1,3,1,1,1)
  Emission factor from DS on heat generation from industrial residual wood mulitplied by the input of wood fuel (direct wood fuel plus production residues)
  production volume 515332 m3; = p_board * (Ref('c09a4a32-8e47-4778-9970-21d5dc6d1cf9') / Ref('2a1c5e01-ffd2-4832-b66b-425041a81590'))
    Calculated from production volume of reference product using the relative outputs.
  property price 26.9 EUR2005; name w_chips_price_EUR2005
    Calculated based on inputs: The price of the product has been calculated as a sum of the values of the material and energy inputs for this product. This value is therefore a rough estimation. It may underestimate the real price since there are additional expenses when producing any product. These expences can include for example labour costs, treatment of waste materials and profit for the producer. Please consider carefully whether this level of data quality is acceptable for your application.
  properties: water content 0.15, wet mass 632.5 kg, carbon content, fossil 0, carbon content, non-fossil 0.494, dry mass 550 kg, water in wet mass 82.5 kg

## Inputs from technosphere
- tap water: 287 kg; lognormal variance with pedigree 0.026, pedigree (1,3,1,1,1)
  properties: wet mass 1 kg, dry mass 0.000337476 kg, carbon content, fossil 0.00178991, water content 2962.17
  note on carbon content, fossil: Bicarbonate content is 2.93 mol/m3. CO2 content is 0.1 mol/m3 (ecoinvent v2.2 report 8, Tab 93.1).
- wooden board factory, organic bonded boards: 3.80952e-8 unit; = 1/(525000*50); lognormal variance with pedigree 0.026, pedigree (1,3,1,1,1)
  estimated based on an assumed yearly production volume o 525,000 m3/year and a life time of infrastructure of 50 years
- paraffin: 4.72 kg; lognormal variance with pedigree 0.026, pedigree (1,3,1,1,1)
  hydrophobing agent
  properties: dry mass 1 kg, carbon content, fossil 0.847059, wet mass 1 kg
- electricity, medium voltage: 15.9264, 15.9264 kWh (2 entries); = 221.2*0.072; lognormal variance with pedigree 0.025, pedigree (1,1,1,1,1)
  electricity input from grid times share of total production in specific country
- electricity, medium voltage: 23.4472 kWh; = 221.2*0.106; lognormal variance with pedigree 0.025, pedigree (1,1,1,1,1)
  electricity input from grid times share of total production not covered via specific country mixes; it covers the electricity input in countries where < 3% of the total production are produced.
- urea formaldehyde resin: 46.6 kg; lognormal variance with pedigree 0.026, pedigree (1,3,1,1,1)
  part of glueing system (inventoried as averaged production average in Europe)
  properties: dry mass 1 kg, wet mass 1 kg, carbon content, fossil 0.408958
- electricity, medium voltage: 17.0324 kWh; = 221.2*0.077; lognormal variance with pedigree 0.025, pedigree (1,1,1,1,1)
  electricity input from grid times share of total production in specific country
- electricity, medium voltage: 11.7236 kWh; = 221.2*0.053; lognormal variance with pedigree 0.025, pedigree (1,1,1,1,1)
  electricity input from grid times share of total production in specific country
- electricity, medium voltage: 7.742 kWh; = 221.2*0.035; lognormal variance with pedigree 0.025, pedigree (1,1,1,1,1)
  electricity input from grid times share of total production in specific country
- electricity, medium voltage: 18.3596 kWh; = 221.2*0.083; lognormal variance with pedigree 0.025, pedigree (1,1,1,1,1)
  electricity input from grid times share of total production in specific country
- electricity, medium voltage: 46.2308 kWh; = 221.2*0.209; lognormal variance with pedigree 0.025, pedigree (1,1,1,1,1)
  electricity input from grid times share of total production in specific country
- electricity, medium voltage: 10.8388 kWh; = 221.2*0.049; lognormal variance with pedigree 0.025, pedigree (1,1,1,1,1)
  electricity input from grid times share of total production in specific country
- electricity, medium voltage: 33.4012 kWh; = 221.2*0.151; lognormal variance with pedigree 0.025, pedigree (1,1,1,1,1)
  electricity input from grid times share of total production in specific country
- electricity, medium voltage: 13.7144 kWh; = 221.2*0.062; lognormal variance with pedigree 0.025, pedigree (1,1,1,1,1)
  electricity input from grid times share of total production in specific country
- heat, district or industrial, other than natural gas: 15.4286 MJ; = 16.2/1.05; lognormal variance with pedigree 0.026, pedigree (1,3,1,1,1)
  Fuel input, converted to heat output
- heat, district or industrial, other than natural gas: 25.3333 MJ; = 26.6/1.05; lognormal variance with pedigree 0.026, pedigree (1,3,1,1,1)
  Fuel input, converted to heat output
- wood chips, from post-consumer wood, measured as dry mass: 111 kg; lognormal variance with pedigree 0.026, pedigree (1,3,1,1,1)
  properties: wet mass 1.4 kg, dry mass 1 kg, water content 0.4, carbon content, non-fossil 0.494
- heat, district or industrial, natural gas: 1073.33 MJ; = (989+138)/1.05; lognormal variance with pedigree 0.026, pedigree (1,3,1,1,1)
  Input of natural gas plus liquified petrolium gas, converted to heat output
- wood chips, dry, measured as dry mass: 367.51 kg; = 23.9+33.6+294+4.81+11.2; lognormal variance with pedigree 0.026, pedigree (1,3,1,1,1)
  input of different types of wood chips from sawmills
  properties: dry mass 1 kg, water content 0.4, carbon content, non-fossil 0.494, wet mass 1.4 kg
  note on carbon content, non-fossil: C content of dry mass is 0.494 kgC/kg dry wood (ecoinvent v2.2 report 9).
- pulpwood, hardwood, measured as solid wood under bark: 0.00744755 m3; = 4.26/572; lognormal variance with pedigree 0.026, pedigree (1,3,1,1,1)
  input in kg divided by the basic wood density of 572 kg/m3
  properties: wet mass 1170 kg, carbon content, non-fossil 0.494, water content 0.8, dry mass 650 kg
- pulpwood, softwood, measured as solid wood under bark: 0.624339 m3; = 236/378; lognormal variance with pedigree 0.026, pedigree (1,3,1,1,1)
  input in kg divided by the basic wood density of 378 kg/m3
  properties: dry mass 450 kg, carbon content, non-fossil 0.494, wet mass 1080 kg, water content 1.4
- slab and siding, softwood, wet, measured as dry mass: 10.2 kg; lognormal variance with pedigree 0.0046, pedigree (1,3,1,1,1)
  input of industrial residual wood
- furnace, wood chips, softwood storage area, 1000kW: 2.7843e-5 unit; = 6.61E-09*wood_fuel; lognormal variance with pedigree 0.011, pedigree (1,3,1,1,1)
  Factor from DS on heat generation from industrial residual wood mulitplied by the input of wood fuel (direct wood fuel plus production residues)
  EcoSpold01Location=CH
- saw dust, wet, measured as dry mass: 30.02 kg; lognormal variance with pedigree 0.0046, pedigree (1,3,1,1,1)
  input of sawdust
- wood chips, wet, measured as dry mass: 0.579 kg; lognormal variance with pedigree 0.026, pedigree (1,3,1,1,1)
  input of wood chips from forestry
  properties: water content 1.1, carbon content, non-fossil 0.494, wet mass 2.1 kg, dry mass 1 kg
- dust collector, electrostatic precipitator, for industrial use: 5.57182e-6 unit; = 1.3889E-09*wood_fuel/1.05; lognormal variance with pedigree 0.025, pedigree (1,1,1,1,1)
  Infrastructure factor from DS on heat generation from industrial residual wood mulitplied by the input of wood fuel (direct wood fuel plus production residues); correction for assumed efficiency as original value refers to heat output
- furnace, wood chips, with silo, 5000kW: 0.000117674 unit; = 2.9333E-08*wood_fuel/1.05; lognormal variance with pedigree 0.025, pedigree (1,1,1,1,1)
  (same comment as for dust collector, electrostatic precipitator, for industrial use)
- electricity, medium voltage: 6.8572 kWh; = 221.2*0.031; lognormal variance with pedigree 0.025, pedigree (1,1,1,1,1)
  electricity input from grid times share of total production in specific country
- diesel, burned in building machine: 35.6 MJ; lognormal variance with pedigree 0.026, pedigree (1,3,1,1,1)
  for internal transport
- lubricating oil: 0.1311 kg; = 0.112+0.0191; lognormal variance with pedigree 0.026, pedigree (1,3,1,1,1)
  input of lubricating oils plus mineral oils, incl. thermooil
  properties: carbon content, fossil 0.75, wet mass 1 kg, dry mass 1 kg
  note on carbon content, fossil: Lubricating oil is produced from diesel. C-content/dry mass of fats and oils considered 75%, from: ecoinvent v2.2 report, n 15a, pg 40
- chemical, organic: 0.895 kg; lognormal variance with pedigree 0.026, pedigree (1,3,1,1,1)
  input of unspecified additives, dyes, flame redardants, etc.
  properties: dry mass 1 kg, wet mass 1 kg, carbon content, fossil 0.628
  note on carbon content, fossil: This dataset is an unweighted average of 20 organic substances (listed in Tab 88.1, ecoinvent v2.2 report 8, part II), being part of the top100 chemicals included in this database. The C-content has also been calculated as an unweighted average of the C content of the substances composing this dataset.
- aluminium sulfate, powder: 0.0228 kg; lognormal variance with pedigree 0.026, pedigree (1,3,1,1,1)
  aluminium sulfate plus input of unspecified hardeners
  properties: wet mass 1 kg, dry mass 1 kg
- urea, as N: 0.3276 kg; = 0.702/(12+4+2*14+16)*(2*14); lognormal variance with pedigree 0.026, pedigree (1,3,1,1,1)
  input of urea, converted to input of N via molar relationship
  properties: dry mass 1 kg, wet mass 1 kg, carbon content, fossil 0.2
- melamine formaldehyde resin: 42 kg; lognormal variance with pedigree 0.026, pedigree (1,3,1,1,1)
  part of glueing system (inventoried as averaged production average in Europe)
  properties: wet mass 1 kg, carbon content, fossil 0.311708, dry mass 1 kg

## Inputs from nature
- Water, river [natural resource, in water]: 0.323 m3; lognormal variance with pedigree 0.025, pedigree (1,1,1,1,1)
- Water, well, in ground [natural resource, in water]: 0.000281 m3; lognormal variance with pedigree 0.026, pedigree (1,3,1,1,1)
- Water, cooling, unspecified natural origin [natural resource, in water]: 0.287 m3; lognormal variance with pedigree 0.025, pedigree (1,3,1,1,1)

## Emissions to nature
- Chromium VI [air, urban air close to ground]: 1.6849e-7 kg; = 4E-11*wood_fuel; lognormal variance with pedigree 0.48, pedigree (2,3,3,1,1)
  (same comment as for residual wood, dry)
- Hydrocarbons, aliphatic, unsaturated [air, urban air close to ground]: 0.013058 kg; = 3.1E-06*wood_fuel; lognormal variance with pedigree 0.43, pedigree (2,3,3,1,1)
  (same comment as for residual wood, dry)
- Phenol, pentachloro- [air, urban air close to ground]: 3.41193e-8 kg; = 8.1E-12*wood_fuel; lognormal variance with pedigree 0.43, pedigree (2,3,3,1,1)
  (same comment as for residual wood, dry)
- Benzene [air, urban air close to ground]: 0.00383316 kg; = 9.1E-07*wood_fuel; lognormal variance with pedigree 0.43, pedigree (2,3,3,1,1)
  (same comment as for residual wood, dry)
- Methane, non-fossil [air, urban air close to ground]: 0.00631839 kg; = 1.5E-06*wood_fuel; lognormal variance with pedigree 0.43, pedigree (2,3,3,1,1)
  (same comment as for residual wood, dry)
- PAH, polycyclic aromatic hydrocarbons [air, urban air close to ground]: 4.67561e-5 kg; = 1.11E-08*wood_fuel; lognormal variance with pedigree 0.43, pedigree (2,3,3,1,1)
  (same comment as for residual wood, dry)
- Arsenic [air, urban air close to ground]: 4.21226e-6 kg; = 1E-09*wood_fuel; lognormal variance with pedigree 0.43, pedigree (2,3,3,1,1)
  (same comment as for residual wood, dry)
- Nickel [air, urban air close to ground]: 2.52736e-5 kg; = 6E-09*wood_fuel; lognormal variance with pedigree 0.43, pedigree (2,3,3,1,1)
  (same comment as for residual wood, dry)
- NMVOC, non-methane volatile organic compounds, unspecified origin [air, urban air close to ground]: 0.395399 kg; = 3.5E-06*wood_fuel + (0.519-0.138-0.000344); lognormal variance with pedigree 0.16, pedigree (2,3,3,1,1)
  Emission factor from DS on heat generation from industrial residual wood mulitplied by the input of wood fuel (direct wood fuel plus production residues) plus estimated emissions from wood and glue drying processes (based on Albrecht et al. 2009) minus emissions that have been inventoried specifically
- Benzene, ethyl- [air, urban air close to ground]: 0.000126368 kg; = 3E-08*wood_fuel; lognormal variance with pedigree 0.43, pedigree (2,3,3,1,1)
  (same comment as for residual wood, dry)
- Chromium [air, urban air close to ground]: 1.66805e-5 kg; = 3.96E-09*wood_fuel; lognormal variance with pedigree 0.43, pedigree (2,3,3,1,1)
  (same comment as for residual wood, dry)
- Nitrogen oxides [air, urban air close to ground]: 0.505471 kg; = 0.00012*wood_fuel; lognormal variance with pedigree 0.073, pedigree (2,3,3,1,1)
  (same comment as for residual wood, dry)
- Chlorine [air, urban air close to ground]: 0.000758207 kg; = 1.8E-07*wood_fuel; lognormal variance with pedigree 0.43, pedigree (2,3,3,1,1)
  (same comment as for residual wood, dry)
- Ammonia [air, urban air close to ground]: 0.00728721 kg; = 1.73E-06*wood_fuel; lognormal variance with pedigree 0.43, pedigree (2,3,3,1,1)
  (same comment as for residual wood, dry)
- Sodium [air, urban air close to ground]: 0.00547594 kg; = 1.3E-06*wood_fuel; lognormal variance with pedigree 0.43, pedigree (2,3,3,1,1)
  (same comment as for residual wood, dry)
- Magnesium [air, urban air close to ground]: 0.00151641 kg; = 3.6E-07*wood_fuel; lognormal variance with pedigree 0.43, pedigree (2,3,3,1,1)
  (same comment as for residual wood, dry)
- Bromine [air, urban air close to ground]: 0.000252736 kg; = 6E-08*wood_fuel; lognormal variance with pedigree 0.43, pedigree (2,3,3,1,1)
  (same comment as for residual wood, dry)
- Particulates, < 2.5 um [air, urban air close to ground]: 0.0105307 kg; = 2.5E-06*wood_fuel; lognormal variance with pedigree 0.073, pedigree (2,3,3,1,1)
  (same comment as for residual wood, dry)
- Dioxins, measured as 2,3,7,8-tetrachlorodibenzo-p-dioxin [air, urban air close to ground]: 1.26368e-10 kg; = 3E-14*wood_fuel; lognormal variance with pedigree 0.43, pedigree (2,3,3,1,1)
  (same comment as for residual wood, dry)
- Hydrocarbons, aliphatic, alkanes, unspecified [air, urban air close to ground]: 0.00383316 kg; = 9.1E-07*wood_fuel; lognormal variance with pedigree 0.43, pedigree (2,3,3,1,1)
  (same comment as for residual wood, dry)
- Sulfur dioxide [air, urban air close to ground]: 0.0105307 kg; = 2.5E-06*wood_fuel; lognormal variance with pedigree 0.43, pedigree (2,3,3,1,1)
  (same comment as for residual wood, dry)
- Benzo(a)pyrene [air, urban air close to ground]: 2.10613e-6 kg; = 5E-10*wood_fuel; lognormal variance with pedigree 0.43, pedigree (2,3,3,1,1)
  (same comment as for residual wood, dry)
- Fluorine [air, urban air close to ground]: 0.000210613 kg; = 5E-08*wood_fuel; lognormal variance with pedigree 0.43, pedigree (2,3,3,1,1)
  (same comment as for residual wood, dry)
- Benzene, hexachloro- [air, urban air close to ground]: 3.03283e-11 kg; = 7.2E-15*wood_fuel; lognormal variance with pedigree 0.43, pedigree (2,3,3,1,1)
  (same comment as for residual wood, dry)
- Dinitrogen monoxide [air, urban air close to ground]: 0.0096882 kg; = 2.3E-06*wood_fuel; lognormal variance with pedigree 0.43, pedigree (2,3,3,1,1)
  (same comment as for residual wood, dry)
- Formaldehyde [air, urban air close to ground]: 0.138548 kg; = 1.3E-07*wood_fuel+0.138; lognormal variance with pedigree 0.43, pedigree (2,3,3,1,1)
  Emission factor from DS on heat generation from industrial residual wood mulitplied by the input of wood fuel (direct wood fuel plus production residues) plus estimated emissions from wood and glue drying processes
- Lead [air, urban air close to ground]: 0.000105307 kg; = 2.5E-08*wood_fuel; lognormal variance with pedigree 0.43, pedigree (2,3,3,1,1)
  (same comment as for residual wood, dry)
- Carbon dioxide, non-fossil [air, urban air close to ground]: 429.651 kg; = 0.102*wood_fuel; lognormal variance with pedigree 0.0032, pedigree (2,3,3,1,1)
  (same comment as for residual wood, dry)
- m-Xylene [air, urban air close to ground]: 0.000505471 kg; = 1.2E-07*wood_fuel; lognormal variance with pedigree 0.43, pedigree (2,3,3,1,1)
  (same comment as for residual wood, dry)
- Mercury [air, urban air close to ground]: 1.26368e-6 kg; = 3E-10*wood_fuel; lognormal variance with pedigree 0.43, pedigree (2,3,3,1,1)
  (same comment as for residual wood, dry)
- Phosphorus [air, urban air close to ground]: 0.00126368 kg; = 3E-07*wood_fuel; lognormal variance with pedigree 0.43, pedigree (2,3,3,1,1)
  (same comment as for residual wood, dry)
- Potassium [air, urban air close to ground]: 0.0985669 kg; = 2.34E-05*wood_fuel; lognormal variance with pedigree 0.43, pedigree (2,3,3,1,1)
  (same comment as for residual wood, dry)
- Carbon monoxide, non-fossil [air, urban air close to ground]: 0.842452 kg; = 2E-04*wood_fuel; lognormal variance with pedigree 0.023, pedigree (2,3,3,1,1)
  (same comment as for residual wood, dry)
- Acetaldehyde [air, urban air close to ground]: 0.000600948 kg; = 6.1E-08*wood_fuel+0.000344; lognormal variance with pedigree 0.43, pedigree (2,3,3,1,1)
  Emission factor from DS on heat generation from industrial residual wood mulitplied by the input of wood fuel (direct wood fuel plus production residues ) plus estimated emissions from wood and glue drying processes (based on Albrecht et al. 2009).
- Copper [air, urban air close to ground]: 9.26697e-5 kg; = 2.2E-08*wood_fuel; lognormal variance with pedigree 0.43, pedigree (2,3,3,1,1)
  (same comment as for residual wood, dry)
- Calcium [air, urban air close to ground]: 0.0246417 kg; = 5.85E-06*wood_fuel; lognormal variance with pedigree 0.43, pedigree (2,3,3,1,1)
  (same comment as for residual wood, dry)
- Toluene [air, urban air close to ground]: 0.00126368 kg; = 3E-07*wood_fuel; lognormal variance with pedigree 0.43, pedigree (2,3,3,1,1)
  (same comment as for residual wood, dry)
- Manganese [air, urban air close to ground]: 0.000716084 kg; = 1.7E-07*wood_fuel; lognormal variance with pedigree 0.43, pedigree (2,3,3,1,1)
  (same comment as for residual wood, dry)
- Cadmium [air, urban air close to ground]: 2.94858e-6 kg; = 7E-10*wood_fuel; lognormal variance with pedigree 0.43, pedigree (2,3,3,1,1)
  (same comment as for residual wood, dry)
- Zinc [air, urban air close to ground]: 0.00126368 kg; = 3E-07*wood_fuel; lognormal variance with pedigree 0.43, pedigree (2,3,3,1,1)
  (same comment as for residual wood, dry)
- Particulates, > 10 um [air, unspecified]: 0.0802 kg; lognormal variance with pedigree 0.43, pedigree (3,3,1,1,1)
  dust emissions
- Methanol [air, non-urban air or from high stacks]: 0.018 kg; lognormal variance with pedigree 0.43, pedigree (3,3,3,1,1)
  Estimated emissions from wood and glue drying processes

## Sampling procedure
Survey among member companies of the European Panel Federation; emissions profile per MJ wood input from PSI (2014)

## Review by Emilia Moreno Ruiz 2015-01-16
Activity Link corrected from IR (Iran) to IE (Ireland)
