# sawnwood production, softwood, raw, dried (u=10%)

Dataset: EcoSpold 2, unit process
Geography: RER
Time period: 2014-01-01 to 2014-12-31
Technology level: current
Classification: ISIC rev.4 ecoinvent: 1610:Sawmilling and planing of wood
Classification: EcoSpold01Categories: wooden materials/extraction
Scenario: Business-as-Usual
Generated by: Emilia Moreno Ruiz
Database: ecoinvent
isCopyrightProtected: false
accessRestrictedTo: 1

## General comment
This activity is providing a more generic sawnwood product, combining inputs from the specific products issued from drying in the sawmil. The relative contribution is based in their Production Volumes.

## Included activities start
Entry of the specific products issued of the drying activity

## Included activities end
Delivery of the generic planed product

## Reference product
- sawnwood, softwood, raw, dried (u=10%): 1 m3; By-product classification allocatable product; CPC 31101: Wood, sawn or chipped lengthwise, sliced or peeled, of a thickness exceeding 6 mm, of coniferous wood
  production volume 5.44353e6 m3; = 0.287*1.8967E+07
    10% of the Production Volume issued from the drying has been made accesible as this generic product.
    The Production Volumes have been downscaled from GLO to RER using the relative GDP values 2011 (source: United Nations, <http://data.un.org/Glossary.aspx?q=GDP+%28current+US%24%29>, accessed 20130726).
  property price 160 EUR2005
    Expert judgement (Urs Luginbühl, Swiss Sawmilling industry, personal communication in June 2014). Cross-reference; FAOSTAT (accessed 20140428). The price is calculated by using data on total world import quantity (m3) and import value (1000 USD), year 2005. 109432798 m3 of Sawnwood (C) - coniferous was imported in the world in 2005. The import value was 22249842000 USD. The calculated price is thus (22249842000/109432798=203*0.8=) 164 Euro.
  properties: carbon content, non-fossil 0.494, carbon content, fossil 0, water in wet mass 90 kg, dry mass 450 kg, wet mass 540 kg, water content 0.2

## Inputs from technosphere
- sawnwood, beam, softwood, raw, dried (u=10%): 0.333333 m3; = 1/3; lognormal variance with pedigree 0.0006, pedigree (1,1,1,1,1)
  The input share has been calculated using data from the drying activity
  properties: water content 0.1, carbon content, non-fossil 0.494, dry mass 387.2 kg, wet mass 425.92 kg
- sawnwood, lath, softwood, raw, dried (u=10%): 0.333333 m3; = 1/3; lognormal variance with pedigree 0.0006, pedigree (1,1,1,1,1)
  The input share has been calculated using data from the drying activity
  properties: water content 0.1, dry mass 387.2 kg, carbon content, non-fossil 0.494, wet mass 425.92 kg
- sawnwood, board, softwood, raw, dried (u=10%): 0.333333 m3; = 1/3; lognormal variance with pedigree 0.0006, pedigree (1,1,1,1,1)
  The input share has been calculated using data from the drying activity
  properties: dry mass 387.2 kg, carbon content, non-fossil 0.494, wet mass 425.92 kg, water content 0.1
